*SHELL SECTION, ELSET=pid, MATERIAL=steel
                      1.,
**
** MATERIALS
**
**
**steel
**
*MATERIAL, NAME=steel
*DENSITY
                 7.85E-9,
*ELASTIC, TYPE=ISOTROPIC
                 210000.,                     0.33
**
**
**
**
** BOUNDARY
**
**
*NODE
       1,        3.999501048086864,        2.818139045610568,                       0.
       2,                       0.,                       0.,                       0.
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**
** MEMBRANE and STRUCTURAL ELEMENTS
**
*ELEMENT, TYPE=S2, ELSET=pid
       1,        3,        2,        4
       2,        1,        3,        4
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**
**
**
*BOUNDARY, TYPE=DISPLACEMENT
       2,        1,        2,                       0.
       4,        1,        2,                       0.
       8,        1,        2,                       0.
      12,        1,        2,                       0.
      17,        1,        2,                       0.
      22,        1,        2,                       0.
      29,        1,        2,                       0.
      62,        1,        2,                       0.
**
** STEPS
**
**
** STEP 1
**
** *STEP, NAME=Anonymous STEP 1
*STATIC
**
** CLOAD
**
*CLOAD
      74,        2,                     100.
     124,        2,                     100.
     146,        2,                     100.
     298,        2,                     100.
     341,        2,                     100.
     348,        2,                     100.
** *END STEP
**
**
**
** SECTION DATA
**
**
**
**
