**
*HEADING

**
*MATERIAL, NAME=M1;mid
*DENSITY
                 7.85E-9,
*ELASTIC, TYPE=ISOTROPIC
                 210000.,                      0.3
**
*SOLID SECTION, ELSET=P1;pid, MATERIAL=M1;mid
                      1.,
**
** MATERIALS
**
**
**M1;mid
**
**
**
*NODE
       1,        2.263632187202159,        4.478411209724541,                       0.
       2,        5.000000000000014,                       0.,                       0.
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**
** MEMBRANE and STRUCTURAL ELEMENTS
**
*ELEMENT, TYPE=CPS4, ELSET=P1;pid
       1,        1,        4,        3,        2
       5,       12,        1,        6,       17
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*ELEMENT, TYPE=CPS3, ELSET=P1;pid
       2,        4,        1,        7
       3,        1,       12,        7
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**
**
**
**
**
**
**
** SECTION DATA
**
**
**
**
**
** STEPS
**
**
** STEP 1
**
*STEP, NAME=Anonymous STEP 1
*STATIC
**
** CLOAD
**
*CLOAD
    3852,        2,                    -100.
**
** BOUNDARY
**
*BOUNDARY, TYPE=DISPLACEMENT
       3,        1,        2,                       0.
       4,        1,        2,                       0.
       7,        1,        2,                       0.
      12,        1,        2,                       0.
      17,        1,        2,                       0.
      23,        1,        2,                       0.
      29,        1,        2,                       0.
      38,        1,        2,                       0.
      48,        1,        2,                       0.
      54,        1,        2,                       0.
      67,        1,        2,                       0.
      80,        1,        2,                       0.
      92,        1,        2,                       0.
     107,        1,        2,                       0.
     123,        1,        2,                       0.
     137,        1,        2,                       0.
     152,        1,        2,                       0.
     173,        1,        2,                       0.
     191,        1,        2,                       0.
     209,        1,        2,                       0.
     230,        1,        2,                       0.
     254,        1,        2,                       0.
     277,        1,        2,                       0.
     301,        1,        2,                       0.
     328,        1,        2,                       0.
     350,        1,        2,                       0.
     377,        1,        2,                       0.
     405,        1,        2,                       0.
     435,        1,        2,                       0.
     468,        1,        2,                       0.
     503,        1,        2,                       0.
     539,        1,        2,                       0.
     577,        1,        2,                       0.
     614,        1,        2,                       0.
     655,        1,        2,                       0.
     694,        1,        2,                       0.
     735,        1,        2,                       0.
     773,        1,        2,                       0.
     810,        1,        2,                       0.
     846,        1,        2,                       0.
     882,        1,        2,                       0.
     915,        1,        2,                       0.
     949,        1,        2,                       0.
     983,        1,        2,                       0.
    1022,        1,        2,                       0.
    1057,        1,        2,                       0.
    1096,        1,        2,                       0.
    1135,        1,        2,                       0.
    1173,        1,        2,                       0.
    1211,        1,        2,                       0.
    1253,        1,        2,                       0.
*END STEP
