*MATERIAL, NAME=M2
*DENSITY
                 2.68E-9,
*ELASTIC, TYPE=ISOTROPIC
                  70000.,                      0.3
**
*SOLID SECTION, ELSET=P2, MATERIAL=M2
**
** MATERIALS
**
**
**M2
**
**
*NODE
       1,      -2.4999999999999427,       -4.330156491140794,                       0.
       2,        -4.99989788515587,        -8.66031298228166,                       0.
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**
**
**
*ELEMENT, TYPE=C3D10, ELSET=P2
    1059,      884,     1039,     1028,      871,     4976,     4975,     5013,     6349,     4977,     5014
    1060,     1039,      516,     1028,      871,     4979,     5015,     4975,     4977,     6383,     5014
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**
**
**
**
**
** BOUNDARY
**
*BOUNDARY, TYPE=DISPLACEMENT
18,        1,        3,                       0.
1,         1,        3,                       0.
7,         1,        3,                       0.
9,         1,        3,                       0.
2,         1,        3,                       0.
3,         1,        3,                       0.
4,         1,        3,                       0.
5,         1,        3,                       0.
6,         1,        3,                       0.
97,        1,        3,                       0.
8,         1,        3,                       0.
10,        1,        3,                       0.
11,        1,        3,                       0.
13,        1,        3,                       0.
12,        1,        3,                       0.
**
** *STEP
**
** *STATIC
**
** *CLOAD
** 461, 1, 12333.0
**
** *MATRIX GENERATE, STIFFNESS
** *MATRIX GENERATE, MASS
** *MATRIX GENERATE, LOAD
**
** *STEADY STATE DYNAMICS
** 50,100,100
** *NODE FILE
** u
*FREQUENCY
10
** *END STEP
** *STEP
** *MATRIX GENERATE, STIFFNESS,MASS
** *MATRIX OUTPUT, STIFFNESS, MASS, FORMAT=COORDINATE
** *END STEP
